l1 := 0.05
l2 := 0.15
b := 0.04
a := 0.005
d := 0.09
omega := 1
t := 0, 0.01 .. 100
m1 := 0.019625
m2 := 0.058875
# b - длина ползуна, a - меньшая сторона сечения
# шатуна и кривошипа
# d - диаметр цилиндра ползуна
# l - соответсвующие длины
fi1(t) := omega*t
Xb(fi1) := l1*cos(fi1)
m3 := 2
Yb(fi1) := l1*sin(fi1)
i1 := 4.16667*10^-6  # i - крч, момент инерции
i2 := 0.0001125
i3 := 0.0379167
Xs1(fi1) := l1/2*cos(fi1)
Xc(fi1) := l1*cos(fi1) + l2*(1 - sin(fi1)^2/9)^(1/2)
Ys1(fi1) := l1/2*sin(fi1)
Yc(fi1) := l1*sin(fi1) + l2*sin(fi1)/3
axs1(fi1) := d^2/dfi1^2(Xs1(fi1))
vxc(fi1) := d/dfi1(Xc(fi1))  # omega появляется из-за дифференциирования сложной ф-ции x(fi(t)) или y(fi(t)), fi(t) = omega * t
ays1(fi1) := d^2/dfi1^2(Ys1(fi1))
vyc(fi1) := d/dfi1(Yc(fi1))
axc(fi1) := d/dfi1(vxc(fi1))
Xt(fi1, lt) := l1*cos(fi1) + lt*(1 - sin(fi1)^2/9)^(1/2)
ayc(fi1) := d/dfi1(vyc(fi1))
Yt(fi1, lt) := l1*sin(fi1) + lt*sin(fi1)/3
eps2(fi1) := omega^2*sin(fi1)*cos(fi1)^2/(27*(1 - sin(fi1)^2/9)^(3/2)) + omega^2*sin(fi1)/(3*(1 - sin(fi1)^2/9)^(1/2))
Fc := 543.671
axs2(fi1) := d^2/dfi1^2(Xt(fi1, l2/2))
ays2(fi1) := d^2/dfi1^2(Yt(fi1, l2/2))
# Звено 3:
g := 9.8  # Звено 1:
Ф3x(fi1) := -m3*axc(fi1)
G3 := m3*g
Ф1x(fi1) := -m1*axs1(fi1)
# Звено 2:
Mф2(fi1) := -i2*eps2(fi1)
Ф2y(fi1) := -m2*ays2(fi1)
Ф1y(fi1) := -m1*ays1(fi1)
Mф1(fi1) := 0
Ф2x(fi1) := -m2*axs2(fi1)
G2 := m2*g
G1 := m1*g
# Пошли формулы искомых реакций и моментов:
R23x(fi1) := -Fc - Ф3x(fi1)
R12x(fi1) := -Fc - Ф3x(fi1) - Ф2x(fi1)
R01x(fi1) := -Fc - Ф3x(fi1) - Ф2x(fi1) - Ф1x(fi1)
R12y(fi1) := (-Mф2(fi1) - R12x(fi1)*|Yc(fi1) - Yb(fi1)| - Ф2x(fi1)*|(Yc(fi1) - Yb(fi1))/2| - Ф2y(fi1)*|(Xc(fi1) - Xb(fi1))/2| - G2*|(Xc(fi1) - Xb(fi1))/2|)/|Xc(fi1) - Xb(fi1)|
R01y(fi1) := -Ф1y(fi1) - G1 + R12y(fi1)
R32y(fi1) := -Ф2y(fi1) - G2 - R12y(fi1)
R03y(fi1) := -G3 - Ф2y(fi1) - G2 - R12y(fi1)
Mд(fi1) := (-Mф1(fi1) + R12x(fi1)*l1*sin(fi1)) + R12y(fi1)*l1*cos(fi1) - Ф1x(fi1)*l1*0.5*sin(fi1) - Ф1y(fi1)*l1*0.5*cos(fi1) - G1*l1*0.5*cos(fi1)
R01(fi1) := (R01x(fi1)^2 + R01y(fi1)^2)^(1/2)
R12(fi1) := (R12x(fi1)^2 + R12y(fi1)^2)^(1/2)
R32(fi1) := (R23x(fi1)^2 + R32y(fi1)^2)^(1/2)
R03(fi1) := R03y(fi1)
max01 := 1
Given
Maximize(R01, max01) = 1.56927
R01max := R01(Maximize(R01, max01))
R01max = 576.451
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min01 := 1
Given
Minimize(R01, min01) = 0.00266326
R01min := R01(Minimize(R01, min01))
R01min = 543.808
max12 := 1
Given
Maximize(R12, max12) = 1.56928
R12max := R12(Maximize(R12, max12))
R12max = 576.515
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min12 := 1
Given
Minimize(R12, min12) = 0.00159652
R12min := R12(Minimize(R12, min12))
R12min = 543.808
max32 := 1
Given
Maximize(R32, max32) = 1.56932
R32max := R32(Maximize(R32, max32))
R32max = 576.71
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min32 := 1
Given
Minimize(R32, min32) = 4.42099e-10
R32min := R32(Minimize(R32, min32))
R32min = 543.804
maxM := 1
Given
Maximize(Mд, maxM) = -1.27744
Mд(Maximize(Mд, maxM)) = 28.6633
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minM := 1
Given
Minimize(Mд, minM) = 1.86387
Mд(Minimize(Mд, minM)) = -28.6601
max03 := 1
Given
Maximize(R03, max03) = 2.26265e-10
R03max := R03(Maximize(R03, max03))
R03max = -19.8885
min03 := 1
Given
Minimize(R03, min03) = 1.57063
R03min := R03(Minimize(R03, min03))
R03min = -212.095
Rmax := max(|R01max|, |R12max|, |R32max|, |R03max|)
k := 20
sigma02 := 210*10^6
Rmax = 576.71
2*576.71/x^2 - sigma02/k ≤ 0 solve, x → 0.0104809123558 ≤ x < ∞ or -∞ < x ≤ -0.0104809123558
Max := 1.569
R12y(Max) = 191.913
R12x(Max) = -543.635
R23x(Max) = -543.636
R01y(Max) = 191.721
R01x(Max) = -543.635
eps2(Max) = 0.353553
Mф2(Max) = -3.97747e-5
Fc = 543.671
R03(Max) = -212.095
R23x(Max) = -543.636
R32y(Max) = -192.495
R01x(Max) = -543.635
R01y(Max) = 191.721
Mд(Max) = -27.1645
